// SBML level 3 version 2

function f_BW(Age)
  3.938425 + 0.7518199*Age*12 - 0.02023793*(Age*12)^2 + 0.0002921682*(Age*12)^3 - 2.06762e-6*(Age*12)^4 + 8.469e-9*(Age*12)^5 - 2.188427e-11*(Age*12)^6 + 3.699776e-14*(Age*12)^7 - 4.099077e-17*(Age*12)^8 + 2.874804e-20*(Age*12)^9 - 1.159732e-23*(Age*12)^10 + 2.052602e-27*(Age*12)^11;
end

function f_Metallothionein_Kidney(Age)
  piecewise(0.95, Age < 30, 0.95 - 0.95/3*(Age - 30)/50);
end

function f_Kidney_Urine(Age, Increase_Cd_Urine)
  piecewise(0.00014, Age < 30, 0.00014 + Increase_Cd_Urine*(Age - 30));
end

model PBK_Cd()
  // model units - substance: MicroGM, time: DAY, volume: L, extent: MicroGM

  // Compartments:
  compartment default_compartment = 1;
  compartment Metallothionein = 1 L; Metallothionein is "metallothionein";
  compartment Liver; Liver has L; Liver is "liver";
  compartment Kidney; Kidney has L; Kidney is "kidney";
  compartment Feces = 1 L; Feces is "feces";
  compartment Urine = 1 L; Urine is "urine";
  compartment Gut; Gut has L; Gut is "gut";
  compartment Lung; Lung has L; Lung is "lung";
  compartment Plasma; Plasma has L; Plasma is "blood plasma";
  compartment RBC; RBC has L; RBC is "red blood cells";
  compartment Others; Others has L; Others is "Rest of the body";

  // Species:
  substanceOnly species AGut in Gut = 0; AGut is "amount of chemical in gut";
  substanceOnly species ALiver in Liver = 0; ALiver is "amount of chemical in liver";
  substanceOnly species AKidney in Kidney = 0; AKidney is "amount of chemical in kidney";
  substanceOnly species ALung in Lung = 0; ALung is "Amount in lungs";
  substanceOnly species AUrine in Urine = 0; AUrine is "Amount in urine";
  substanceOnly species AFeces in Feces = 0; AFeces is "Amount in feces";
  substanceOnly species APlasma in Plasma = 0; APlasma is "amount of chemical in plasma";
  substanceOnly species ARBC in RBC = 0; ARBC is "Amount in red blood cells";
  substanceOnly species AMetallothionein in Metallothionein = 0; AMetallothionein is "Amount in metallothionein";
  substanceOnly species AOthers in Others = 0; AOthers is "Rest of the body";
  species AIntestine in default_compartment = 0; AIntestine is "Amount of intestine";

  // Parameters:
  DeltaBW = 1 UNITLESS; DeltaBW is "Variability on bodyweight";
  BW has L; BW is "body weight";
  Age has YR; Age is "age";
  Fabs = 0.048 UNITLESS; Fabs is "Fraction absorbed in intestine";
  Ka = 0.05 PER_DAY; Ka is "Transfer from intestine to total uptake";
  K_Inhalation_Uptake = 0.05 PER_DAY; K_Inhalation_Uptake is "Transfer from lung to total intake";
  K_Lung_Intestine = 0.005 PER_DAY; K_Lung_Intestine is "Rate of absorption from Lung to intestine";
  F_Uptake_Metallothionein = 0.25 UNITLESS; F_Uptake_Metallothionein is "Fraction of uptake pool transferred to metallothionein";
  Max_Metallothionein = 1 MicroGM_PER_DAY; Max_Metallothionein is "Maximal dose in metallothionein added daily";
  K_Plasma_Others = 0.44 PER_DAY; K_Plasma_Others is "Transfer from plasma to the rest of the body";
  K_Others_Plasma = 0.00014 PER_DAY; K_Others_Plasma is "Transfer from rest of the body to plasma";
  K_Plasma_Feces = 0.27 PER_DAY; K_Plasma_Feces is "Transfer from plasma to feces";
  K_Plasma_Liver = 0.25 PER_DAY; K_Plasma_Liver is "Transfer from plasma to liver";
  K_Liver_Plasma = 3e-5 PER_DAY; K_Liver_Plasma is "Transfer from liver to plasma";
  K_Liver_Metallothionein = 0.00016 PER_DAY; K_Liver_Metallothionein is "Transfer from liver to metallothionein";
  K_Liver_Feces = 5e-5 PER_DAY; K_Liver_Feces is "Transfer from liver to feces";
  K_RBC_Metallothionein = 0.012 PER_DAY; K_RBC_Metallothionein is "Transfer from reb blood cells to metallothionein";
  K_Metallothionein_Kidney has PER_DAY; K_Metallothionein_Kidney is "Transfer from metallothionein to kidney";
  K_Kidney_Plasma = 1e-5 PER_DAY; K_Kidney_Plasma is "Transfer from kidney to plasma";
  K_Kidney_Urine has PER_DAY; K_Kidney_Urine is "Transfer from kidney to urine";
  Increase_Cd_Urine = 1.1e-6 PER_DAY; Increase_Cd_Urine is "Temporal factor increasing Cd elimination in urine";
  K_Plasma_RBC = 0.04 PER_DAY; K_Plasma_RBC is "Transfer from plasma to red blood cells";
  VLiverc = 0.025 UNITLESS; VLiverc is "Fraction of volume of liver";
  VKidneyc = 0.004 UNITLESS; VKidneyc is "Fraction of volume of kidney";
  VGutc = 0.0182 UNITLESS; VGutc is "Fraction of volume of gut";
  VLungc = 0.0068 UNITLESS; VLungc is "Fraction of volume of lung";
  VBloodc = 0.076 UNITLESS; VBloodc is "Fraction of volume of blood";
  HCT = 0.425 UNITLESS; HCT is "Hematocrit";
  VBlood has L; VBlood is "Volume of blood";
  Uptake has MicroGM_PER_DAY; Uptake is "Theorical total dose for metallothionein";
  Uptake_Metallothionein has MicroGM_PER_DAY; Uptake_Metallothionein is "Transfer from total uptake to metallothionein";
  Gut_Plasma_NoLimit has MicroGM_PER_DAY; Gut_Plasma_NoLimit is "Dose from gut to plasma with unsaturated metallothionein";
  Gut_Plasma_Limit has MicroGM_PER_DAY; Gut_Plasma_Limit is "Dose from gut to plasma with saturated metallothionein";
  Gut_Plasma has MicroGM_PER_DAY; Gut_Plasma is "Transfer from gut to plasma";
  Lung_Plasma_NoLimit has MicroGM_PER_DAY; Lung_Plasma_NoLimit is "Dose from lung to plasma with unsaturated metallothionein";
  Lung_Plasma_Limit has MicroGM_PER_DAY; Lung_Plasma_Limit is "Dose from lung to plasma with saturated metallothionein";
  Lung_Plasma has MicroGM_PER_DAY; Lung_Plasma is "Transfer from lung to plasma";

  // Assignment rules:
  Liver := VLiverc*BW;
  Kidney := VKidneyc*BW;
  Gut := VGutc*BW;
  Lung := VLungc*BW;
  Plasma := VBlood*(1 - HCT);
  RBC := VBlood*HCT;
  Others := BW - (Liver + Kidney + Gut + Lung + VBlood);
  BW := f_BW(Age)*DeltaBW;
  Age := time/365;
  K_Metallothionein_Kidney := f_Metallothionein_Kidney(Age);
  K_Kidney_Urine := f_Kidney_Urine(Age, Increase_Cd_Urine);
  VBlood := VBloodc*BW;
  Uptake := AGut*Ka*Fabs + ALung*K_Inhalation_Uptake + ALung*K_Lung_Intestine*Fabs;
  Uptake_Metallothionein := F_Uptake_Metallothionein*Uptake;
  Gut_Plasma_NoLimit := (1 - F_Uptake_Metallothionein)*AGut*Ka*Fabs + ALung*K_Lung_Intestine*Fabs;
  Gut_Plasma_Limit := AGut*Ka*Fabs + ALung*K_Lung_Intestine*Fabs - Max_Metallothionein*((AGut*Ka*Fabs + ALung*K_Lung_Intestine*Fabs)/Uptake);
  Gut_Plasma := piecewise(Gut_Plasma_NoLimit, Uptake_Metallothionein < Max_Metallothionein, Gut_Plasma_Limit);
  Lung_Plasma_NoLimit := (1 - F_Uptake_Metallothionein)*ALung*K_Inhalation_Uptake;
  Lung_Plasma_Limit := ALung*K_Inhalation_Uptake - Max_Metallothionein*(ALung*K_Inhalation_Uptake/Uptake);
  Lung_Plasma := piecewise(Lung_Plasma_NoLimit, Uptake_Metallothionein < Max_Metallothionein, Lung_Plasma_Limit);

  // Reactions:
  _J0: AGut -> APlasma; Gut_Plasma;
  _J1: AGut -> AMetallothionein; AGut*Ka*Fabs + ALung*K_Lung_Intestine*Fabs - Gut_Plasma;  // modifiers: ALung
  _J2: AGut -> AFeces; AGut*(1 - Fabs);
  _J3: ALung -> APlasma; Lung_Plasma;
  _J4: ALung -> AMetallothionein; ALung*K_Inhalation_Uptake - Lung_Plasma;
  _J5: ALung -> AIntestine; ALung*K_Lung_Intestine;
  _J6: APlasma -> AOthers; APlasma*K_Plasma_Others;
  _J7: APlasma -> ARBC; APlasma*K_Plasma_RBC;
  _J8: APlasma -> AFeces; APlasma*K_Plasma_Feces;
  _J9: APlasma -> ALiver; APlasma*K_Plasma_Liver;
  _J10: ARBC -> AMetallothionein; ARBC*K_RBC_Metallothionein;
  _J11: AMetallothionein -> AKidney; AMetallothionein*K_Metallothionein_Kidney;
  _J12: AMetallothionein -> AUrine; AMetallothionein*(1 - K_Metallothionein_Kidney);
  _J13: ALiver -> APlasma; ALiver*K_Liver_Plasma;
  _J14: ALiver -> AMetallothionein; ALiver*K_Liver_Metallothionein;
  _J15: ALiver -> AFeces; ALiver*K_Liver_Feces;
  _J16: AKidney -> APlasma; AKidney*K_Kidney_Plasma;
  _J17: AKidney -> AUrine; AKidney*K_Kidney_Urine;
  _J18: AOthers -> APlasma; AOthers*K_Others_Plasma;

  // Unit definitions:
  unit MicroGM = 1e-6 gram;
  unit DAY = 86400 second;
  unit L = litre;
  unit UNITLESS = dimensionless;
  unit YR = 3.15576e7 second;
  unit PER_DAY = 1 / (86400 second);
  unit MicroGM_PER_DAY = 1e-6 gram / (86400 second);
end
