// SBML level 3 version 2

model Cui2026_Cd_Human()
  // Cd PBK (Cui et al, 2026):
  // model units - substance: MicroGM, time: DAY, volume: L, extent: MicroGM

  // Compartments:
  compartment AirDailyIntake; AirDailyIntake has L;
  compartment DietDailyIntake; DietDailyIntake has L;
  compartment Lung; Lung has L;
  compartment GILumen; GILumen has L;
  compartment IntestinalTissue; IntestinalTissue has L;
  compartment ExtraTissueBlood; ExtraTissueBlood has L;
  compartment LiverBlood; LiverBlood has L;
  compartment LiverTissue; LiverTissue has L;
  compartment KidneyBlood; KidneyBlood has L;
  compartment KidneyTissue; KidneyTissue has L;
  compartment RestofBodyBlood; RestofBodyBlood has L;
  compartment RestofBodyTissue; RestofBodyTissue has L;
  compartment Filtrate; Filtrate has L;
  compartment Urine; Urine has L;
  compartment Feces; Feces has L;

  // Species:
  substanceOnly species AAirDailyIntake in AirDailyIntake = 0;
  substanceOnly species ALU in Lung = 0;
  substanceOnly species ADietDailyIntake in DietDailyIntake = 0;
  substanceOnly species AGILumen in GILumen = 0;
  substanceOnly species AETB_Free in ExtraTissueBlood = 0;
  substanceOnly species AETB_PP in ExtraTissueBlood = 0;
  substanceOnly species AETB_RBC in ExtraTissueBlood = 0;
  substanceOnly species ALiverB_Free in LiverBlood = 0;
  substanceOnly species ALiverB_PP in LiverBlood = 0;
  substanceOnly species ALiverB_RBC in LiverBlood = 0;
  substanceOnly species ALiverT_Free in LiverTissue = 0;
  substanceOnly species ALiverT_MT in LiverTissue = 0;
  substanceOnly species AKidneyB_Free in KidneyBlood = 0;
  substanceOnly species AKidneyB_PP in KidneyBlood = 0;
  substanceOnly species AKidneyB_RBC in KidneyBlood = 0;
  substanceOnly species AKidneyT_Free in KidneyTissue = 0;
  substanceOnly species AKidneyT_MT in KidneyTissue = 0;
  substanceOnly species ARBB_Free in RestofBodyBlood = 0;
  substanceOnly species ARBB_PP in RestofBodyBlood = 0;
  substanceOnly species ARBB_RBC in RestofBodyBlood = 0;
  substanceOnly species ARBT_Free in RestofBodyTissue = 0;
  substanceOnly species ARBT_MT in RestofBodyTissue = 0;
  substanceOnly species AFiltrate_Free in Filtrate = 0;
  substanceOnly species AFiltrate_MT in Filtrate = 0;
  substanceOnly species AUrineFiltrate in Urine = 0;
  substanceOnly species AUrineKidneyTissue in Urine = 0;
  substanceOnly species AFecesUnabsorbed in Feces = 0;
  substanceOnly species AFecesBile in Feces = 0;
  substanceOnly species AFecesIT in Feces = 0;

  // Parameters:
  BWa = 88;
  BWl = 88;
  year = 35;
  FVB = 0.067;
  Iwa = 1.8;
  FVLB = 0.11;
  kwa = 0.31;
  FVKB = 0.36;
  FVRBB = 0.2182;
  FQL = 0.25;
  FQK = 0.19;
  C1 = 0.1;
  C2 = 0.4;
  C5 = 0.05;
  C7 = 0.25;
  C3 = 0.05;
  C4 = 0.005;
  C6 = 0.05;
  C8 = 1;
  k5 = 20;
  k6 = 80;
  CX = 4;
  C16 = 0.012;
  f9 = 5e-7;
  f10 = 1.98e-8;
  f11 = 0.65;
  k12 = 20;
  k13 = 667;
  C15 = 0.00165;
  f15 = 0.023;
  f16 = 0.099;
  C17x = 0.95;
  k18 = 1;
  C21 = 7.7e-7;
  C19x = 9.8e-5;
  k20 = 20;
  k21 = 11.11;
  f22 = 4e-9;
  f23 = 2e-5;
  f24 = 1;
  C11 = 0.0001;
  PP = 1;
  RBC = 1;
  MTL = 1;
  MTK = 1;

  // Assignment rules:
  VB := FVB*BWl;
  VETB := (A - FVRBB*B)/(1 - FVRBB);
  VL := Iwa*(BWl/BWa)^0.85;
  VLiverB := FVLB*VL;
  VLiverT := (1 - FVLB)*VL;
  VK := kwa*(BWl/BWa)^0.84;
  VKidneyB := FVKB*VK;
  VKidneyT := (1 - FVKB)*VK;
  A := VB - VLiverB - VKidneyB;
  B := BWl - VL - VK;
  VRB := B - VETB;
  VRBB := FVRBB*VRB;
  VRBT := (1 - FVRBB)*VRB;
  Lbm := 0.88*BWl;
  tmp := (Lbm - 8.58)/0.0272/1000;
  UCER := piecewise(0.5, tmp < 0.5, tmp);
  QCB := 15*BWl^0.74*24;
  QL := FQL*QCB;
  QK := FQK*QCB;
  FQRB := 1 - FQL - FQK;
  QRB := FQRB*QCB;
  C14 := f9*QL;
  C13 := f10*QL;
  C12 := f11*QL;
  k15 := f15*QK;
  k16 := f16*QK;
  C17 := piecewise(C17x - C17x/3*(year - 30)/50, year > 30, C17x);
  C19 := piecewise(C19x + C21*(year - 30), year > 30, C19x);
  C18 := f22*QK;
  C10 := f23*QRB;
  C9 := f24*QRB;
  CABlood_Free := AETB_Free/VETB;
  CABlood_PP := AETB_PP/VETB;
  CABlood_RBC := AETB_RBC/VETB;
  CVLiverB_Free := ALiverB_Free/VLiverB;
  CVLiverB_PP := ALiverB_PP/VLiverB;
  CVLiverB_RBC := ALiverB_RBC/VLiverB;
  CLiverT_Free := ALiverT_Free/VLiverT;
  CLiverT_MT := ALiverT_MT/VLiverT;
  CVKidneyB_Free := AKidneyB_Free/VKidneyB;
  CVKidneyB_PP := AKidneyB_PP/VKidneyB;
  CVKidneyB_RBC := AKidneyB_RBC/VKidneyB;
  CKidneyT_Free := AKidneyT_Free/VKidneyT;
  CKidneyT_MT := AKidneyT_MT/VKidneyT;
  CVRBB_Free := ARBB_Free/VRBB;
  CVRBB_PP := ARBB_PP/VRBB;
  CVRBB_RBC := ARBB_RBC/VRBB;
  CRBT_Free := ARBT_Free/VRBT;
  uptakeTotal_Lung := C3*ALU;
  uptake1_Lung := piecewise(C8*uptakeTotal_Lung/(uptakeTotal_Lung + uptakeTotal_GI), C7*(uptakeTotal_Lung + uptakeTotal_GI) > C8, C7*uptakeTotal_Lung);
  uptakeTotal_GI := C6*AGILumen;
  uptake2_Lung := uptakeTotal_Lung - uptake1_Lung;
  uptake1_GI := piecewise(C8*uptakeTotal_GI/(uptakeTotal_Lung + uptakeTotal_GI), C7*(uptakeTotal_Lung + uptakeTotal_GI) > C8, C7*uptakeTotal_GI);
  uptake2_GI := uptakeTotal_GI - uptake1_GI;

  // Reactions:
  _J0: AAirDailyIntake -> ALU; C2*AAirDailyIntake;
  _J1: ALU -> AGILumen; C4*ALU;
  _J2: ALU -> AETB_Free; uptake2_Lung;
  _J3: ALU -> AETB_PP; uptake1_Lung;
  _J4: ADietDailyIntake -> AGILumen; C5*ADietDailyIntake;
  _J5: AAirDailyIntake -> AGILumen; C5*C1*AAirDailyIntake;
  _J6: AGILumen -> ALiverB_Free; uptake2_GI;
  _J7: AGILumen -> ALiverB_PP; uptake1_GI;
  _J8: AETB_Free -> ALiverB_Free; QL*CABlood_Free;
  _J9: AETB_PP -> ALiverB_PP; QL*CABlood_PP;
  _J10: AETB_RBC -> ALiverB_RBC; QL*CABlood_RBC;
  _J11: AETB_Free -> AKidneyB_Free; QK*CABlood_Free;
  _J12: AETB_PP -> AKidneyB_PP; QK*CABlood_PP;
  _J13: AETB_RBC -> AKidneyB_RBC; QK*CABlood_RBC;
  _J14: AETB_Free -> ARBB_Free; QRB*CABlood_Free;
  _J15: AETB_PP -> ARBB_PP; QRB*CABlood_PP;
  _J16: AETB_RBC -> ARBB_RBC; QRB*CABlood_RBC;
  _J17: AETB_PP -> AETB_Free; k5*AETB_PP;
  _J18: AETB_PP -> AETB_PP; k6*AETB_Free*PP;  // modifiers: AETB_Free
  _J19: AETB_RBC -> AETB_Free; C16*AETB_RBC;
  _J20: AETB_Free -> AETB_RBC; CX*AETB_Free*RBC;
  _J21: ALiverB_Free -> AETB_Free; QL*CVLiverB_Free;
  _J22: ALiverB_Free -> ALiverB_PP; k6*ALiverB_Free*PP;
  _J23: ALiverB_Free -> ALiverB_RBC; CX*ALiverB_Free*RBC;
  _J24: ALiverB_PP -> AETB_PP; QL*CVLiverB_PP;
  _J25: ALiverB_PP -> ALiverB_Free; k5*ALiverB_PP;
  _J26: ALiverB_RBC -> AETB_RBC; QL*CVLiverB_RBC;
  _J27: ALiverB_RBC -> ALiverB_Free; C16*ALiverB_RBC;
  _J28: ALiverT_Free -> ALiverB_Free; C13*CLiverT_Free;
  _J29: ALiverB_Free -> ALiverT_Free; C12*CVLiverB_Free;
  _J30: ALiverT_MT -> ALiverT_Free; k12*ALiverT_MT;
  _J31: ALiverT_Free -> ALiverT_MT; k13*ALiverT_Free*CLiverT_MT;
  _J32: ALiverT_MT -> ALiverB_PP; C14*CLiverT_MT;
  _J33: AKidneyB_Free -> AETB_Free; QK*CVKidneyB_Free;
  _J34: AKidneyB_Free -> AKidneyB_PP; k6*AKidneyB_Free*PP;
  _J35: AKidneyB_Free -> AKidneyB_RBC; CX*AKidneyB_Free*RBC;
  _J36: AKidneyB_PP -> AETB_PP; QK*CVKidneyB_PP;
  _J37: AKidneyB_PP -> AKidneyB_Free; k5*AKidneyB_PP;
  _J38: AKidneyB_RBC -> AETB_RBC; QK*CVKidneyB_RBC;
  _J39: AKidneyB_RBC -> AKidneyB_Free; C16*AKidneyB_RBC;
  _J40: AKidneyT_MT -> AKidneyT_Free; k20*AKidneyT_MT;
  _J41: AKidneyT_Free -> AKidneyT_MT; k21*AKidneyT_Free*CKidneyT_MT;
  _J42: AKidneyT_Free -> AKidneyB_Free; C18*CKidneyT_MT;
  _J43: AFiltrate_MT -> AKidneyT_MT; C17*AFiltrate_MT;
  _J44: ARBB_Free -> AETB_Free; QRB*CVRBB_Free;
  _J45: ARBB_Free -> ARBB_PP; k6*ARBB_Free*PP;
  _J46: ARBB_Free -> ARBB_RBC; CX*ARBB_Free*RBC;
  _J47: ARBB_PP -> AETB_PP; QRB*CVRBB_PP;
  _J48: ARBB_PP -> ARBB_Free; k5*ARBB_PP;
  _J49: ARBB_RBC -> AETB_RBC; QRB*CVRBB_RBC;
  _J50: ARBB_RBC -> ARBB_Free; C16*ARBB_RBC;
  _J51: ARBT_Free -> ARBB_Free; C10*CRBT_Free;
  _J52: ARBB_Free -> ARBT_Free; C9*CVRBB_Free;
  _J53: AKidneyT_Free -> AKidneyB_Free; C18*CKidneyT_MT;
  _J54: AFiltrate_MT -> AKidneyT_MT; C17*AFiltrate_MT;
  _J55: AKidneyB_Free -> AFiltrate_Free; k16*CVKidneyB_Free;
  _J56: AKidneyB_PP -> AFiltrate_MT; k15*CVKidneyB_PP;
  _J57: AFiltrate_Free -> AUrineFiltrate; k18*AFiltrate_Free;
  _J58: AFiltrate_MT -> AUrineFiltrate; (1 - C17)*AFiltrate_MT;
  _J59: AKidneyT_Free -> AUrineKidneyTissue; C19*AKidneyT_Free;
  _J60: AKidneyT_MT -> AUrineKidneyTissue; C19*AKidneyT_MT;
  _J61: ADietDailyIntake -> AFecesUnabsorbed; (1 - C5)*ADietDailyIntake;
  _J62: AAirDailyIntake -> AFecesUnabsorbed; (1 - C5)*C1*AAirDailyIntake;
  _J63: ALU -> AFecesUnabsorbed; (1 - C5)*C4*ALU;
  _J64: ALiverT_Free -> AFecesBile; C15*ALiverT_Free;
  _J65: ARBT_Free -> AFecesIT; C11*ARBT_Free;

  // Unit definitions:
  unit MicroGM = 1e-6 gram;
  unit DAY = 86400 second;
  unit L = litre;
end
