// SBML level 3 version 2

function BW_male_lifetime(mval)
  3.938425 + 0.7518199*mval - 0.02023793*mval^2 + 0.0002921682*mval^3 - 2.06762e-6*mval^4 + 8.469e-9*mval^5 - 2.188427e-11*mval^6 + 3.699776e-14*mval^7 - 4.099077e-17*mval^8 + 2.874804e-20*mval^9 - 1.159732e-23*mval^10 + 2.052602e-27*mval^11;
end

function BW_female_lifetime(mval)
  3.932403 + 0.6866462*mval - 0.01949911*mval^2 + 0.00031311*mval^3 - 2.466654e-6*mval^4 + 1.113217e-8*mval^5 - 3.131402e-11*mval^6 + 5.693737e-14*mval^7 - 6.706947e-17*mval^8 + 4.947858e-20*mval^9 - 2.079251e-23*mval^10 + 3.800367e-27*mval^11;
end

model Cd_mod_v3()
  // model units - substance: NanoGM, time: DAY, volume: L

  // Compartments:
  compartment LungComp; LungComp has L; LungComp is "lung compartment";
  compartment GUT_LUMENComp; GUT_LUMENComp has L; GUT_LUMENComp is "gut lumen compartment";
  compartment INTESTINE_TISSUEComp; INTESTINE_TISSUEComp has L; INTESTINE_TISSUEComp is "intestinal tissue compartment";
  compartment PlasmaComp; PlasmaComp has L; PlasmaComp is "plasma compartment";
  compartment RBCComp; RBCComp has L; RBCComp is "red blood cell compartment";
  compartment MTComp; MTComp has L; MTComp is "Metallothionein compartment";
  compartment LiverComp; LiverComp has L; LiverComp is "liver compartment";
  compartment KidneyComp; KidneyComp has L; KidneyComp is "kidney compartment";
  compartment OtherComp; OtherComp has L; OtherComp is "rest of body compartment";
  compartment FecesComp; FecesComp has L; FecesComp is "feces compartment";
  compartment UrineComp; UrineComp has L; UrineComp is "urine compartment";

  // Species:
  substanceOnly species LUNG in LungComp = 0; LUNG is "amount in lung";  // substance in MicroGM
  substanceOnly species GUT_LUMEN in GUT_LUMENComp = 0; GUT_LUMEN is "amount in lumen";  // substance in MicroGM
  substanceOnly species INTESTINE_TISSUE in INTESTINE_TISSUEComp = 0; INTESTINE_TISSUE is "amount in intestinal tissue";  // substance in MicroGM
  substanceOnly species PLASMA in PlasmaComp = 0; PLASMA is "amount in plasma";  // substance in MicroGM
  substanceOnly species RBC in RBCComp = Acord_total; RBC is "amount in red blood cells";  // substance in MicroGM
  substanceOnly species META in MTComp = 0; META is "amount in metallothionein";  // substance in MicroGM
  substanceOnly species LIVER in LiverComp = 0; LIVER is "amount in liver";  // substance in MicroGM
  substanceOnly species KIDNEY in KidneyComp = 0; KIDNEY is "amount in kidney";  // substance in MicroGM
  substanceOnly species OTHER in OtherComp = 0; OTHER is "amount in restbody";  // substance in MicroGM
  substanceOnly species FECES in FecesComp = 0; FECES is "cumulative amount in feces";  // substance in MicroGM
  substanceOnly species URINE in UrineComp = 0; URINE is "cumulative amount in urine";  // substance in MicroGM

  // Parameters:
  k1_cig = 0.1 UNITLESS; k1_cig is "Respiratory deposition to GI from smoke";
  k1_dust = 0.7 UNITLESS; k1_dust is "Respiratory deposition to GI from dust";
  k2_cig = 0.4 UNITLESS; k2_cig is "Respiratory deposition to lung from smoke";
  k2_dust = 0.13 UNITLESS; k2_dust is "Respiratory deposition to lung from dust";
  k3 = 0.05 PER_DAY; k3 is "First-order transfer rate constant from lung to total systemic uptake";
  k4 = 0.005 PER_DAY; k4 is "First-order transfer rate constant from lung to GI";
  kabs = 1 PER_DAY; kabs is "First-order rate constant (added explicitly for unit consistency)";
  k5_h = 0.05 UNITLESS; k5_h is "Fraction of absorbed Cd in gut transferred to intestine in males";
  k5_f = 0.1 UNITLESS; k5_f is "Fraction of absorbed Cd in gut transferred to intestine in females";
  k6 = 0.05 PER_DAY; k6 is "First-order transfer rate constant from intestine to total systemic uptake";
  k7 = 0.25 UNITLESS; k7 is "Fraction of total systemic Cd uptake to the metallothionein";
  k8 = 1 MicroGM_PER_DAY; k8 is "Maximum Cd flux into the metallothionein";
  k_MT_out = 1 PER_DAY; k_MT_out is "First-order turnover rate constant for MT-bound Cd (added explicitly for unit consistency)";
  k9 = 0.44 PER_DAY; k9 is "kinetic constant rate PLASMA -> OTHER tissues";
  k10 = 0.00014 PER_DAY; k10 is "kinetic constant rate OTHER tissues -> PLASMA";
  k11 = 0.27 PER_DAY; k11 is "kinetic constant rate PLASMA -> feces";
  k12 = 0.25 PER_DAY; k12 is "kinetic constant rate PLASMA -> liver";
  k13 = 3e-5 PER_DAY; k13 is "kinetic constant rate liver -> PLASMA";
  k14 = 0.00016 PER_DAY; k14 is "kinetic constant rate liver -> MT pool";
  k15 = 5e-5 PER_DAY; k15 is "kinetic constant rate liver -> feces";
  kx = 0.04 PER_DAY; kx is "kinetic constant rate PLASMA -> RBC";
  k16 = 0.012 PER_DAY; k16 is "kinetic constant rate RBC-> MT pool";
  k17 = 0.95 UNITLESS; k17 is "Fraction of MT-bound Cd removal to KIDNEY; remainder goes directly to urine.";
  k18 = 1e-5 PER_DAY; k18 is "kinetic constant rate KIDNEY -> PLASMA";
  k19 = 0.00014 PER_DAY; k19 is "urine elimination rate constant";
  k21 = 1.1e-6; k21 is "Age-dependent increase in kidney-to-urine elimination after age 30";
  k20 = 0.1 UNITLESS; k20 is "Fraction of PLASMA + META Cd amounts to calculated whole-blood Cd";
  sex = 2;
  Age = 30;
  Delta_BWs3 = 1;
  Delta_creat = 1;
  Ccord = 0;
  year has YR;

  // Assignment rules:
  year := time/365 + Age;
  Delta_BW := piecewise(1 + (Delta_BWs3 - 1)*year*365/1095, year*365 <= 1095, Delta_BWs3);
  BW_male := piecewise(BW_male_lifetime(year*12)*Delta_BW, year <= 79, 76*Delta_BW);
  BW_female := piecewise(BW_female_lifetime(year*12)*Delta_BW, year <= 79, 68*Delta_BW);
  wbw := piecewise(BW_male, sex == 1, BW_female);
  hct_mid := 1.12815e-6*year^3 - 0.000172362*year^2 + 0.00815264*year + 0.327363;
  hct := piecewise(0.359, year <= 2, hct_mid, year < 18, 0.4248446);
  vb_male := piecewise((-0.027*year + 0.077)*wbw, year < 1, 0.0761/(1 + exp(-0.683*year + 0.946))*wbw);
  vb_female := piecewise((-0.0273*year + 0.0771)*wbw, year < 1, (3.28e-5*year^3 - 0.00121*year^2 + 0.0124*year + 0.0386)*wbw, year < 14.019723, 0.065*wbw);
  vb := piecewise(vb_male, sex == 1, vb_female);
  vp := (1 - hct)*vb;
  vrbc := hct*vb;
  vk_male := piecewise((0.0042 + (0.00767 - 0.0042)*exp(-0.206*year))*wbw, year <= 79, (0.0042 + 2.969074e-10)*wbw);
  vk_female := piecewise((0.0046 + (0.00709 - 0.0046)*exp(-0.221*year))*wbw, year <= 79, (0.0046 + 6.514063e-11)*wbw);
  vk := piecewise(vk_male, sex == 1, vk_female);
  vlungs := piecewise(0.0068*wbw, sex == 1, 0.007*wbw);
  vint_male := piecewise((-8.2562e-5*year^2 + 0.0013523*year + 0.01293)*wbw, year < 16, 0.014*wbw);
  vint_female := piecewise((-7.421e-5*year^2 + 0.001276*year + 0.01298)*wbw, year < 14.453301, 0.016*wbw);
  vintestine := piecewise(vint_male, sex == 1, vint_female);
  vl_male := piecewise((0.0247 + (0.0409 - 0.0247)*exp(-0.218*year))*wbw, year <= 79, (0.0247 + 5.371498e-10)*wbw);
  vl_female := piecewise((0.0233 + (0.038 - 0.0233)*exp(-0.122*year))*wbw, year <= 79, (0.0233 + 9.58489e-7)*wbw);
  vl := piecewise(vl_male, sex == 1, vl_female);
  vother := wbw - (vk + vb + vl + vintestine + vlungs);
  wbw_f := vk + vb + vl + vintestine + vlungs + vother;
  Vtidal_male := piecewise(0.0337*year + 0.0407, year < 21, 0.75);
  Vtidal_female := 0.46 + (0.0392 - 0.46)*exp(-0.127*year);
  Vtidal := piecewise(Vtidal_male, sex == 1, Vtidal_female);
  FqBreath := 12 + (38.9 - 12)*exp(-0.176*year);
  vds_male := piecewise(0.0076*year + 0.0101, year <= 18.4, 0.15);
  vds_female := 0.12 + (0.0107 - 0.12)*exp(-0.0986*year);
  vds := piecewise(vds_male, sex == 1, vds_female);
  VInhalation := FqBreath*(Vtidal - vds)*60*24;
  ucr_base := 0.032 + 0.02098*year + 0.009104*year^2 - 0.000455*year^3 + 7.578e-6*year^4 - 4.232e-8*year^5;
  ucr := piecewise(ucr_base*Delta_creat, year <= 70, 0.865756*Delta_creat);
  Vurine := 0.0294*wbw_f;
  k5_active := piecewise(k5_h, sex == 1, k5_f);
  k19x := piecewise(k19, year <= 30, k19 + k21*(year - 30));
  k17_decline := k17 - k17/3*(year - 30)/50;
  k17x := piecewise(k17, year <= 30, 0, k17_decline < 0, k17_decline);
  k17b := 1 - k17x;
  wbw0 := piecewise(3.938425, sex == 1, 3.932403);
  vb0 := piecewise(0.077*wbw0, sex == 1, 0.0771*wbw0);
  Acord_total := Ccord*vb0;
  uptakeTotal_Lung := k3*LUNG;
  uptakeTotal_GI := k6*INTESTINE_TISSUE;
  TOTAL_UPTAKE := uptakeTotal_Lung + uptakeTotal_GI;
  UPTAKE_MT := piecewise(k7*TOTAL_UPTAKE, k7*TOTAL_UPTAKE <= k8, k8);
  UPTAKE_PLASMA := TOTAL_UPTAKE - UPTAKE_MT;
  uptakeMT_Lung := piecewise(0, TOTAL_UPTAKE <= 0, UPTAKE_MT*uptakeTotal_Lung/TOTAL_UPTAKE);
  uptakeMT_GI := piecewise(0, TOTAL_UPTAKE <= 0, UPTAKE_MT*uptakeTotal_GI/TOTAL_UPTAKE);
  uptakePlasma_Lung := uptakeTotal_Lung - uptakeMT_Lung;
  uptakePlasma_GI := uptakeTotal_GI - uptakeMT_GI;
  BLOOD := RBC + k20*(PLASMA + META);
  BLOOD_burden := BLOOD/vb;
  kidney_burden := KIDNEY/vk;
  ur := k_MT_out*k17b*META + k19x*KIDNEY;
  Conc_urine_cd := ur/Vurine;
  ucdcr := ur/ucr;
  total_internal := GUT_LUMEN + INTESTINE_TISSUE + LUNG + RBC + META + LIVER + KIDNEY + OTHER + PLASMA;
  Excreted := FECES + URINE;

  // Reactions:
  _J0: LUNG -> GUT_LUMEN; k4*LUNG;
  _J1: LUNG -> META; uptakeMT_Lung;
  _J2: LUNG -> PLASMA; uptakePlasma_Lung;
  _J3: GUT_LUMEN -> INTESTINE_TISSUE; k5_active*kabs*GUT_LUMEN;
  _J4: GUT_LUMEN -> FECES; (1 - k5_active)*kabs*GUT_LUMEN;
  _J5: INTESTINE_TISSUE -> META; uptakeMT_GI;
  _J6: INTESTINE_TISSUE -> PLASMA; uptakePlasma_GI;
  _J7: PLASMA -> OTHER; k9*PLASMA;
  _J8: OTHER -> PLASMA; k10*OTHER;
  _J9: PLASMA -> FECES; k11*PLASMA;
  _J10: PLASMA -> LIVER; k12*PLASMA;
  _J11: LIVER -> PLASMA; k13*LIVER;
  _J12: LIVER -> META; k14*LIVER;
  _J13: LIVER -> FECES; k15*LIVER;
  _J14: PLASMA -> RBC; kx*PLASMA;
  _J15: RBC -> META; k16*RBC;
  _J16: META -> KIDNEY; k_MT_out*k17x*META;
  _J17: META -> URINE; k_MT_out*k17b*META;
  _J18: KIDNEY -> PLASMA; k18*KIDNEY;
  _J19: KIDNEY -> URINE; k19x*KIDNEY;

  // Unit definitions:
  unit NanoGM = 1e-9 gram;
  unit DAY = 86400 second;
  unit L = litre;
  unit MicroGM = 1e-6 gram;
  unit UNITLESS = dimensionless;
  unit PER_DAY = 1 / (86400 second);
  unit MicroGM_PER_DAY = 1e-6 gram / (86400 second);
  unit YR = 3.15576e7 second;
end
